<Lems>

    <!--

        This LEMS file has been automatically generated using PyNeuroML v1.0.8 (libNeuroML v0.5.2)

     -->

    <!-- Specify which component to run -->
    <Target component="hello_world"/>

    <!-- Include core NeuroML2 ComponentType definitions -->
    <Include file="Cells.xml"/>
    <Include file="Networks.xml"/>
    <Include file="Simulation.xml"/>

    <Include file="hello_world_neuroml.net.nml"/>

    <Simulation id="hello_world" length="1000ms" step="0.1ms" target="IzNet" seed="123">  <!-- Note seed: ensures same random numbers used every run -->

        <OutputFile id="output0" fileName="hello_world.v.dat">
            <OutputColumn id="IzhPop0[0]" quantity="IzhPop0[0]/v"/>
        </OutputFile>

    </Simulation>

</Lems>
