<?xml version="1.0" ?>
<neuroml xmlns="http://www.neuroml.org/schema/neuroml2" xmlns:xsi="http://www.w3.org/2001/XMLSchema-instance" xsi:schemaLocation="http://www.neuroml.org/schema/neuroml2
https://raw.github.com/NeuroML/NeuroML2/development/Schemas/NeuroML2/NeuroML_v2.3.xsd" id="TestNeuroML">
    <izhikevich2007Cell C="100pF" v0="-60mV" k="0.7nS_per_mV" vr="-60mV" vt="-40mV" vpeak="35mV" a="0.03per_ms" b="-2nS" c="-50.0mV" d="100pA" id="izh2007RS0"/>
    <pulseGenerator delay="100ms" duration="800ms" amplitude="0.07 nA" id="pulseGen_0"/>
    <network id="IzNet">
        <population component="izh2007RS0" size="1" id="IzhPop0"/>
        <explicitInput target="IzhPop0[0]" input="pulseGen_0"/>
    </network>
</neuroml>
